// COMSOL Multiphysics 5.6.0.280 model "muestra.mph"
// Outline of the model tree

Geometry
  geom1 "Body 1" (3D, length unit µm)
    blk1: Block | size = {100, 10, 1}
    blk2: Block | pos = {100, -45, 0}; size = {100, 100, 1}
    mir1: Mirror | input = blk1; keep = on; pos = {150, 0, 0}; axis = {1, 0, 0}
    blk3: Block | pos = {140, 0, 0}; size = {20, 20, 1}
    dif1: Difference | input = blk2; input2 = blk3
    fin: Finalize "Form Union"

Materials
  mat1: Common "Si - Polycrystalline silicon" on all domains
    def "Basic"
      thermalexpansioncoefficient = 2.6e-6[1/K]
      heatcapacity = 678[J/(kg*K)]
      relpermittivity = 4.5
      density = 2320[kg/m^3]
      thermalconductivity = 34[W/(m*K)]
    Enu "Young's modulus and Poisson's ratio"
      youngsmodulus = 160e9[Pa]
      poissonsratio = 0.22

Physics
  solid: SolidMechanics on all domains
    dependent variable u = {u, v, w}
    lemm1: LinearElasticModel "Linear Elastic Material 1" (default) | ForceLinearStrainRes = 1
    free1: Free (default)
    init1: init "Initial Values 1" (default)
    bndl1: BoundaryLoad on boundaries 4, 9, 21 | FperArea = {30, 0, 0}
    fix1: Fixed "Fixed Constraint 1" on boundaries 1, 7, 12, 24

Mesh
  mesh1 "Mesh 1" (physics-controlled)

Studies
  std1 "Study 1"
    stat: Stationary

Solver configurations
  sol1 "Solution 1" (study std1)
    v1: Variables "Dependent Variables 1"
    s1: Stationary "Stationary Solver 1"
      fc1: FullyCoupled | linsolver = d1
      d1: Direct "Suggested Direct Solver (solid)" | linsolver = pardiso; pivotperturb = 1.0E-9

Datasets
  dset1: Solution | solution = sol1

Plots
  pg1: PlotGroup3D "Stress (solid)" | data = dset1
    surf1: Surface | expr = solid.mises
      def: Deform "Deformation" | expr = {u, v, w}; descr = Displacement field
  pg2: PlotGroup3D "Boundary Loads (solid)" | data = dset1
    arws1: ArrowSurface "Boundary Load 1" | expr = {solid.bndl1.F_Ax, solid.bndl1.F_Ay, solid.bndl1.F_Az}
      col: Color "Color Expression" | expr = solid.bndl1.F_A_Mag
      def: Deform "Deformation" | expr = {u, v, w}; descr = Displacement field
    arws2: ArrowSurface "Boundary Load 2" | expr = {solid.bndl2.F_Ax, solid.bndl2.F_Ay, solid.bndl2.F_Az}
      col: Color "Color Expression" | expr = solid.bndl2.F_A_Mag
      def: Deform "Deformation" | expr = {u, v, w}; descr = Displacement field
    surf1: Surface "Gray Surfaces" | expr = 1
      def: Deform "Deformation" | expr = {u, v, w}; descr = Displacement field
      sel1: Selection on boundaries 1-24
      tran1: Transparency | transparency = 0.8